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/batch
! ANSYS input file written by Workbench version 2021 R1
! File used for geometry attach: C:\Users\krylo\AppData\Local\Temp\WB_krylo_6532_2\wbnew_files\dp0\SYS\DM\SYS.agdb
/title,wbnew--Static Structural (A5)
/com,--- Data in consistent NMM units. See Solving Units in the help system for more information.
/units,MPA
/prep7
! Turn off shape checking because checks already performed inside WB mesher.
! See help system for more information.
SHPP,OFF,,NOWARN
etcon,set             ! allow ANSYS to choose best KEYOP's for 180x elements, resets any applicable keyopt to MAPDL defaults
/com,*********** Nodes for the whole assembly ***********
nblock,3,,724
(1i9,3e20.9e3)
        1     2.300000000E+01     5.000000000E+00     0.000000000E+00
        2     2.300000000E+01     2.000000000E+00     0.000000000E+00
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-1
/com,*********** Elements for Body 1 "Retaining Ring" ***********
et,1,183
keyo,1,3,1
eblock,19,solid,,34
(19i9)
        1        1        1        1        0        0        0        0        8        0        1        8       44        7        7       64       62        7       61
        1        1        1        1        0        0        0        0        8        0        2       28       47       46       45      103      128      127      102
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-1
/com,*********** Elements for Body 2 "Pressure Cap" ***********
et,2,183
keyo,2,3,1
eblock,19,solid,,155
(19i9)
        2        2        2        2        0        0        0        0        8        0       35      146      259      145      145      352      351      145      350
        2        2        2        2        0        0        0        0        8        0       36      243      303      221      221      569      513      221      512
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-1
/com,*********** Send User Defined Coordinate System(s) ***********
csys,0
toffst,273.15,  ! Temperature offset from absolute zero
/com,*********** Set Reference Temperature ***********
tref,22.
/com,*********** Send Materials ***********
Temperature = 'TEMP' ! Temperature
MP,DENS,1,7.85e-09,	! tonne mm^-3
MP,ALPX,1,1.2e-05,	! C^-1
MP,C,1,434000000,	! mm^2 s^-2 C^-1
MP,KXX,1,60.5,	! tonne mm s^-3 C^-1
MP,RSVX,1,0.00017,	! ohm mm
MP,EX,1,200000,	! tonne s^-2 mm^-1
MP,NUXY,1,0.3,
MP,MURX,1,10000,

Temperature = 'TEMP' ! Temperature
MP,DENS,2,7.75e-09,	! tonne mm^-3
MP,ALPX,2,1.7e-05,	! C^-1
MP,C,2,480000000,	! mm^2 s^-2 C^-1
MP,KXX,2,15.1,	! tonne mm s^-3 C^-1
MP,RSVX,2,0.00077,	! ohm mm
MP,EX,2,193000,	! tonne s^-2 mm^-1
MP,NUXY,2,0.31,
MP,MURX,2,1,

/com,*********** Send Sheet Properties ***********
!************************* Model Summary ********************
!Retaining Ring,	Structural Steel,	matid,	1
!Pressure Cap,	Stainless Steel,	matid,	2
!************************* End Model Summary ********************
/com,*********** Create Contact "Frictionless - Retaining Ring To Pressure Cap" ***********
*set,tid,4
*set,cid,3
r,tid
r,cid
et,tid,169
et,cid,172
eblock,10,,,7
(15i9)
      190        4        4        4        0        7        8       61
      191        4        4        4        0        8        9       63
      192        4        4        4        0        9       10       65
      193        4        4        4        0       10       11       67
      194        4        4        4        0        6        7       59
      195        4        4        4        0        5        6       57
      196        4        4        4        0        2        5       52
-1
eblock,10,,,7
(15i9)
      197        3        3        3        0        7        8       61
      198        3        3        3        0        8        9       63
      199        3        3        3        0        9       10       65
      200        3        3        3        0       10       11       67
      201        3        3        3        0        6        7       59
      202        3        3        3        0        5        6       57
      203        3        3        3        0        2        5       52
-1
eblock,10,,,6
(15i9)
      204        3        4        3        0      195      196      445
      205        3        4        3        0      196      197      447
      206        3        4        3        0      197      198      449
      207        3        4        3        0      194      195      443
      208        3        4        3        0      193      194      441
      209        3        4        3        0      189      193      434
-1
eblock,10,,,6
(15i9)
      210        4        3        4        0      195      196      445
      211        4        3        4        0      196      197      447
      212        4        3        4        0      197      198      449
      213        4        3        4        0      194      195      443
      214        4        3        4        0      193      194      441
      215        4        3        4        0      189      193      434
-1
keyo,cid,8,2               ! auto create asymmetric contact (from Program Controlled setting)
keyo,cid,10,0              ! adjust contact stiffness each NR iteration (from Program Controlled setting)
keyo,cid,12,0              ! standard contact
keyo,cid,18,1              ! small sliding turned on by application
keyo,cid,2,0               ! augmented Lagrange (from Program Controlled setting)
keyo,cid,4,0               ! on Gauss point (from Program Controlled setting)
keyo,cid,9,0               ! use real geometry with stepped effects
keyo,cid,7,0               ! No Prediction
rmod,tid,3,1.       ! FKN
rmod,tid,5,0.       ! ICONT
rmod,tid,6,-0.107354549544214 ! PINB
rmod,tid,10,0.      ! CNOF
rmod,tid,12,0.      ! FKT
rmod,tid,36,28      ! WB DSID
rmod,cid,3,1.       ! FKN
rmod,cid,5,0.       ! ICONT
rmod,cid,6,-0.107354549544214 ! PINB
rmod,cid,10,0.      ! CNOF
rmod,cid,12,0.      ! FKT
rmod,cid,36,28      ! WB DSID
nsel,all
esel,all
/com,*********** Fixed Supports ***********
CMBLOCK,_FIXEDSU,NODE,        9
(8i10)
        19        20        21        22        23        83        85        88
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cmsel,s,_FIXEDSU
d,all,all
nsel,all
/com,*********** Send Compression Only Support ***********
*set,tid,6
*set,cid,5
et,cid,172
et,tid,169
r,tid
r,cid
eblock,10,,,10
(15i9)
      216        5        5        5        0      188      179      414
      217        5        5        5        0      187      188      430
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-1
! Replicate nodes at the same location
nblock,3
(1i9,3e20.9e3)
      660     2.730298762E+01    -5.000000000E+00     0.000000000E+00
      661     2.880298762E+01    -5.000000000E+00     0.000000000E+00
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-1
! Send replicated elements
eblock,10,,,10
(15i9)
      226        6        5        6        0      661      660      662
      227        6        5        6        0      660      663      664
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-1
keyo,cid,10,1              ! Never Adjust Contact Stiffness
keyo,cid,18,1               ! small sliding
esel,s,type,,tid
nele
*set,_nlow,681
n,_nlow,21.302987621652,-5.,0.
d,_nlow,all
mat,cid
type,tid
real,cid
tshape,pilot
en,236,_nlow           ! pilot element needed to get moment reactions
tshape
_npilot38=_nlow
eall
nall
/com,*********** Define Pressure Using Surface Effect Elements ***********
et,7,153
keyop,7,3,10        ! get plane stress option and thickness from underlying element
eblock,10,,,18
(15i9)
      237        7        7        7        0      161      167      379
      238        7        7        7        0      167      166      390
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-1
esel,s,type,,7
keyop,7,7,0                ! Use deformed area for application of load
esel,all
esel,all
fini
/com,****************************************************************************
/com,*************************    SOLUTION       ********************************
/com,****************************************************************************
/solu
antype,0                   ! static analysis
_thickRatio=  0     ! Ratio of thick parts in the model
eqsl,sparse,,,,,1
cntr,print,1               ! print out contact info and also make no initial contact an error
dmpoption,emat,no             ! Don't combine emat file for DANSYS
dmpoption,esav,no             ! Don't combine esav file for DANSYS
nldiag,cont,iter           ! print out contact info each equilibrium iteration
rescontrol,define,last,last,,dele	   ! Program Controlled
/com,****************************************************
/com,******************* SOLVE FOR LS 1 OF 1 ****************
esel,s,type,,7
nsle
sf,all,pres,0.1
nsel,all
esel,all
esel,all
autots,on                  ! Workbench Program Controlled automatic time stepping
nsub,1,10,1                ! due to presence of general nonlinear
time,1.
outres,erase
outres,all,none
outres,nsol,all,
outres,rsol,all
outres,eangl,all
outres,etmp,all
outres,veng,all
outres,strs,all,
outres,epel,all,
outres,eppl,all,
outres,cont,all,
! *********** WB SOLVE COMMAND ***********
! check interactive state
*get,ANSINTER_,active,,int
*if,ANSINTER_,ne,0,then
/eof
*endif
solve
/com *************** Write FE CONNECTORS *********
CEWRITE,file,ce,,INTE
/com,****************************************************
/com,*************** FINISHED SOLVE FOR LS 1 *************
/post1
fini
